# LLC resonant converter close-loop design
# with a simple Gvd
# Definition:
M := 10^6
k := 10^3
m := 10^-3
u := 10^-6
na := 10^-9
p := 10^-12
# Some Calculation Formulars definition
parallel(R1, R2) := R1*R2/(R1 + R2)  # calculate parallel resistors
gain(X, s) := 20*log(|X(s)|)  # Gain of transfer function
P(X, s) := 180/π*angle(Re(X(s)), Im(X(s)))  # phase of transfer function X
phase(X, s) := if(P(X, s) ≥ 90, P(X, s) - 360, P(X, s))  # phase round in 90 degree
phase1(X, s) := P(X, s) - 360
ga(X, y, s) := 20*log(|X(y, s)|)
P(X, y, s) := 180/π*angle(Re(X(y, s)), Im(X(y, s)))
ph(X, y, s) := if(P(X, y, s) ≥ 90, P(X, y, s) - 360, P(X, y, s))
ph1(X, y, s) := P(X, y, s) - 360
n := 100, 101 .. 800
f[n] := 10^((n - 100)/100)
# Step 1: Input LLC Parameters here
L_M := 220*u
L_r := 30*u
C_r := 300*na
nn := 10/11
C_o := 220*u*4
R_Co := 2*m  # capcitor ESR
V_out := 250
I_o := 40
R_L := V_out/I_o
R_L = 6.25
V_in := 650
R_pri := 0.5
R_sec := 0.005  # Transformer winding/MOSFET resistance
# Step 2: Calculate switching frequency at full load
R_e := 8/π^2*nn^2*R_L  # equivalent PRIMARY side resistance
f_os := 1/(2*π*sqrt(L_r*C_r))  # resonant freq
f_os = 53051.6
M(f) := |parallel(2i*π*f*L_M, R_e)/(parallel(2i*π*f*L_M, R_e) + 1/(2i*π*f*C_r) + 2i*π*f*L_r)|
# DC gain curve
# primary voltage
R_eq := π^2/8*(R_sec + R_pri/nn^2)  # SECONDARY resistance
R_eq = 0.752557
V_o(f) := V_in/(nn*2)*M(f) - R_eq*I_o  # Output function
f_s :=
    f_s2 ← 0.9*f_os
    while V_o(f_s2) > V_out
        f_s2 ← f_s2 + f_os/2000
# Find the fs for Vout
V_o(f_s) = 249.73
f_s = 61990.9
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# Step 3: Calculate small signal DC gain from control voltage to output voltage
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# deltaVo/deltaf expression
deltaV_o(f) := d/df(V_o(f))  # derivative
deltaV_o(f_os) = -0.00183783
# From control voltage to the switching frequency ( By UCC25600 and RD)
R_D := 1000
F_m := 83*10^6*1/R_D
# 83kHz per 1mA
F_m = 83000
# Control to Output DC gain
G_c_DC := deltaV_o(f_s)*F_m
20*log(|G_c_DC|) = 58.8548
# Step 4: Control to Output Gc(s), approximately
# - Low frequency double pole
# - ESR zero
# - right half plane zero (ignored)
# Equivalent Values
L_eq := π^2/4*L_r/nn^2
f_o := 1/(2*π*sqrt(L_eq*C_o))  # two POLEs in the transfer functions
# From control to output transfer function:
Wo := 2*π*f_o
f_o = 566.899
Q := 1/Wo*1/(L_eq/R_L + C_o*(R_Co + R_eq))
Q = 0.413872
W_z := 1/(C_o*R_Co)
f_z := W_z/(2*π)
# ESR zero
f_z = 90428.9
G_c(s) := -G_c_DC*(1 + s/W_z)/(1 + s/(Wo*Q) + s^2/Wo^2)
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# Step 5: Determine compensation network
# Case 1: crossover frequency higher than double pole
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# 1. Set the loop gain crossover frequency:
f_c := 1*k
f_o = 566.899
# 2. Cancel the ESR zero, fz, by a compensator pole, fp1.
f_p1 := f_z
f_p1 = 90428.9
w_p1 := 2*π*f_p1
# 3. Place a high frequency compensator pole, fp2 to get the maximum attenuation of the switching ripple and high frequency noise with the minimum phase lag st fc.
f_p2 := f_s
f_p2 = 61990.9
w_p2 := 2*π*f_p2
# 4. Place the two compensator zeroes, fz1 and fz2 below fc.
# Place fz1 below the power stage resonant frequency, fo to avoid a conditional stability.
w_z1 := 0.7*f_o*2*π
w_z2 := 0.8*f_o*2*π
# 5. The integrator gain, fi is determined after step 4.
|Con(s)*G_c(s)| == 1  # at crossover frequency
# According to the poles and zeroes set as above, we get:
ss := 1i*2*π*f_c  # cross over frequency
w_z1 = 2493.35
w_11 := 1/|1/ss*(1 + ss/w_z1)*(1 + ss/w_z2)/((1 + ss/w_p1)*(1 + ss/w_p2))*G_c(ss)|
w_z2 = 2849.54
w_p1 = 568182
w_p2 = 389500
# 6 . Select the compensator parameters
w_11 = 5.19538
# According to the poles and zeroes set as above, the equations listed below can be achieved
Given
R_A == 10.2*k
1/(R_B*C_B) == w_z1
1/(C_A*(R_A + R_X)) == w_z2
1/(R_A*(C_B + C_P)) == 20
w_11 = 5.19538
1/(R_B*C_B*C_P/(C_B + C_P)) == w_p2
1/(R_X*C_A) == w_p1
[R_A; R_B; R_X; C_A; C_B; C_P] := Find(R_A, R_B, R_X, C_A, C_B, C_P) → [10200.0; 82.344707106; 51.4128707179; 3.42326731696e-8; 4.87058129402e-6; 3.13794902952e-8]
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[R_A; R_B; R_X; C_A; C_B; C_P] = [10200; 82.3447; 51.4129; 3.42327e-8; 4.87058e-6; 3.13795e-8]
# Step 6: Check Loop Gain
Z1(s) := R_A*(1/(s*C_A) + R_X)/(R_A + 1/(s*C_A) + R_X)
Con2(s) := w_11*(1 + s/w_z1)*(1 + s/w_z2)/(s*(1 + s/w_p1)*(1 + s/w_p2))
Z2(s) := 1/(s*C_P)*(1/(s*C_B) + R_B)/(1/(s*C_P) + 1/(s*C_B) + R_B)
# original form
Con1(s) := Z2(s)/Z1(s)  # analog  form.
Tv1(s) := Con1(s)*G_c(s)
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# Step 7: Simulate in Simplis and adjust compensation values (Normaly gain should be adjusted to achieve the desired crossover frequency)
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# Step8: Put it into the real circuit. ( More adjustment needed)
# Step 5: Determine compensation network
# Case 2: crossover frequency lower than double pole
# 1. Set the loop gain crossover frequency:
f_c := 100
f_o = 566.899
# 2. Please a pole to attenate the high Q effect at fo
f_p1 := f_o
w_p1 := 2*π*f_p1
# 4. Place one zeroe to boost phase margin
w_z1 := f_o*0.6*2*π
# 5. The integrator gain, fi is determined after step 4.
|Con(s)*G_c(s)| == 1  # at crossover frequency
# According to the poles and zeroes set as above, we get:
ss := 1i*2*π*f_c
w_11 := 1/|1/ss*(1 + ss/w_z1)/(1 + ss/w_p1)*G_c(ss)|
w_11 = 0.739225
# 6 . Select the compensator parameters
# According to the poles and zeroes set as above, the equations listed below can be achieved
Given
R_A == 19.1*k
1/(R_B*C_B) == w_z1
1/(R_A*(C_B + C_P)) == 0.739  # W11 copied here.
1/(R_B*C_B*C_P/(C_B + C_P)) == w_p1
[R_A; R_B; C_B; C_P] := Find(R_A, R_B, C_B, C_P) → [19100.0; 16.5112932031; 2.83388476008e-5; 4.25082714011e-5]
[R_A; R_B; C_B; C_P] = [19100; 16.5113; 2.83388e-5; 4.25083e-5]
# Step 6: Check Loop Gain
Z1(s) := R_A
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Z2(s) := 1/(s*C_P)*(1/(s*C_B) + R_B)/(1/(s*C_P) + 1/(s*C_B) + R_B)
Con1(s) := Z2(s)/Z1(s)
Tv1(s) := Con1(s)*G_c(s)
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# Step 7: Simulate in Simplis and adjust compensation values (Normaly gain should be adjusted to achieve the desired crossover frequency)
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# Step8: Put it into the real circuit. ( More adjustment needed)
#
# Sometimes Rx and CA are still required to increase the phase margin.
# At that condition, the zero by Rx and CA should be much higher than crossover frequency so that it does not affect the gain curve while improve the phase curve.
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